Vgs := 3
RdsMinV := 4.5
R := 1000
Given
R2*5/(R2 + Rt*R/(Rt + R)) == RdsMinV  # Op-Amp at 5V (150A)
(R2*R/(R2 + R))/(Rt + (R2*R/(R2 + R)))*5 == Vgs  # Op-Amp at 0V (0A)
Find(Rt, R2) → [500.0; 3000.0]
